pipe_OD := 450 mm
pipe_WT := 19.5 mm
pipe_density := 7850 kg/m^3
water_density := 1000 kg/m^3
grav := 9.81 m/s^2
pipe_ID := pipe_OD - 2*pipe_WT = 411 mm
pipe_outer_radius := pipe_OD/2 = 225 mm
pipe_inner_radius := pipe_ID/2 = 205.5 mm
pipe_CSA := π*(pipe_outer_radius^2 - pipe_inner_radius^2) = 0.0263729 m^2
pipe_vol := pipe_CSA*1 m = 0.0263729 m^3
pipe_empty_dry_mass := pipe_vol*pipe_density = 207.027 kg
pipe_empty_dry_mass_kN := pipe_empty_dry_mass*grav = 2.03094 kN
CSA_buoyancy := π*pipe_outer_radius^2 = 0.159043 m^2
CSA_vol := CSA_buoyancy*1 m = 0.159043 m^3
Buoyancy_mass := CSA_vol*water_density = 159.043 kg
Buoyancy_mass_kN := Buoyancy_mass*grav = 1.56021 kN
pipe_empty_submerged_mass_kN := pipe_empty_dry_mass_kN - Buoyancy_mass_kN
pipe_empty_submerged_mass_kN = 0.470723 kN
